*Heading
** Job name: rndWn+TriCableF Model name: Model-1
** Generated by: Abaqus/CAE 2017
*Preprint, echo=NO, model=NO, history=NO, contact=NO
**
** PARTS
**
*Part, name=Cable_Bm_2D
*Node
      1,           0.,           0.
      2,           2.,           0.
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*Element, type=B23H
1, 1, 2
2, 2, 3
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*Nset, nset=cable, generate
  1,  57,   1
*Elset, elset=cable, generate
  1,  56,   1
*Orientation, name=Ori-1
1., 0., 0., 0., 1., 0.
3, 0.
** Section: Cable_r_bm  Profile: r_bm
*Beam Section, elset=cable, material=Steel_CablePart, poisson = 0.31, temperature=GRADIENTS, section=CIRC
0.0607227
0.,0.,-1.
*End Part
**
**
** ASSEMBLY
**
*Assembly, name=Assembly
**
*Instance, name=Cable_Bm_2D-1, part=Cable_Bm_2D
          0.,           0.,           0.
          0.,           0.,           0.,           0.,           0.,           1., 26.9859998032316
*End Instance
**
*Nset, nset=LeftAnch, instance=Cable_Bm_2D-1
 1,
*Nset, nset=LoadPoint1Geo_WN1-6, instance=Cable_Bm_2D-1
 3,
*Nset, nset=LoadPoint2Geo_WN7-12, instance=Cable_Bm_2D-1
 5,
*Nset, nset=RightAnch, instance=Cable_Bm_2D-1
 8,
*Nset, nset=Sensor1, instance=Cable_Bm_2D-1
 4,
*Nset, nset=Sensor2, instance=Cable_Bm_2D-1
 6,
*Nset, nset=Sensor3, instance=Cable_Bm_2D-1
 7,
*End Assembly
*Amplitude, name=LinearDec
             0.,              1.,              1.,              0.
*Amplitude, name=Lp10_WhiteNoise1_10s_pw1_fs1k
             0.,  -0.00035738054,           0.001,  -0.00039921485,           0.002,  -0.00041775942,           0.003,  -0.00041355633
          0.004,  -0.00039064154,           0.005,  -0.00035645577,           0.006,  -0.00034653328,           0.007,  -0.00034774496
          0.008,  -0.00035467722,           0.009,  -0.00035813925,            0.01,  -0.00035047916,           0.011,  -0.00036876588
          0.012,  -0.00038330605,           0.013,  -0.00038455691,           0.014,  -0.00036457293,           0.015,  -0.00032164178
          0.016,  -0.00031814183,           0.017,  -0.00031820574,           0.018,  -0.00030994474,           0.019,  -0.00027900147
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            10.,     -0.16948238
*Amplitude, name=Lp10_WhiteNoise2_10s_pw1_fs1k
             0.,     -0.01223851,           0.001,    -0.013492076,           0.002,    -0.013909809,           0.003,     -0.01364609
          0.004,    -0.012982575,           0.005,     -0.01223805,           0.006,    -0.011641427,           0.007,    -0.011371085
          0.008,    -0.011452356,           0.009,    -0.011795028,            0.01,    -0.012240997,           0.011,    -0.012575434
          0.012,    -0.012724743,           0.013,    -0.012673646,           0.014,    -0.012484401,           0.015,     -0.01226002
          0.016,    -0.012030162,           0.017,    -0.011912296,           0.018,     -0.01194062,           0.019,    -0.012099889
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            10.,      0.18108184
*Amplitude, name=SinWave_10s_fSin5s_fs200
             0.,              0.,           0.005,     0.006283144,            0.01,      0.01256604,           0.015,      0.01884844
           0.02,     0.025130095,           0.025,     0.031410759,            0.03,     0.037690183,           0.035,     0.043968118
           0.04,     0.050244318,           0.045,     0.056518534,            0.05,      0.06279052,           0.055,     0.069060026
           0.06,     0.075326806,           0.065,     0.081590612,            0.07,     0.087851197,           0.075,     0.094108313
           0.08,      0.10036171,           0.085,      0.10661115,            0.09,      0.11285638,           0.095,      0.11909716
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            10.,  -4.8985872e-16
*Amplitude, name=Smf_Dec_1s
             0.,              1.,            0.01,          0.9998,            0.02,          0.9992,            0.03,          0.9982
           0.04,          0.9968,            0.05,           0.995,            0.06,          0.9928,            0.07,          0.9902
           0.08,          0.9872,            0.09,          0.9838,             0.1,            0.98,            0.11,          0.9758
           0.12,          0.9712,            0.13,          0.9662,            0.14,          0.9608,            0.15,           0.955
           0.16,          0.9488,            0.17,          0.9422,            0.18,          0.9352,            0.19,          0.9278
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             1.,              0.
*Amplitude, name=TriWave_10s_fTri5s_fs200
             0.,              0.,           0.005,           0.004,            0.01,           0.008,           0.015,           0.012
           0.02,           0.016,           0.025,            0.02,            0.03,           0.024,           0.035,           0.028
           0.04,           0.032,           0.045,           0.036,            0.05,            0.04,           0.055,           0.044
           0.06,           0.048,           0.065,           0.052,            0.07,           0.056,           0.075,            0.06
           0.08,           0.064,           0.085,           0.068,            0.09,           0.072,           0.095,           0.076
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            10.,              0.
**
** MATERIALS
**
*Material, name=Steel_CablePart
*Damping, alpha=0.0622, beta=0.0002
*Density
7800.,
*Elastic
 1.95e+11, 0.31
*Expansion, type=ORTHO
 5.1282e-06,0.,0.
*Material, name=Steel_Other
*Density
7800.,
*Elastic
 1.95e+11, 0.31
**
** BOUNDARY CONDITIONS
**
** Name: LeftAnch Type: Displacement/Rotation
*Boundary
LeftAnch, 1, 1
LeftAnch, 2, 2
LeftAnch, 3, 3
LeftAnch, 4, 4
LeftAnch, 5, 5
** Name: RightAnch Type: Displacement/Rotation
*Boundary
RightAnch, 1, 1
RightAnch, 2, 2
RightAnch, 3, 3
RightAnch, 4, 4
RightAnch, 5, 5
**
** PREDEFINED FIELDS
**
** Name: CoolDownPres   Type: Temperature
*Initial Conditions, type=TEMPERATURE
Cable_Bm_2D-1.cable, 853.
** ----------------------------------------------------------------
**
** STEP: GP
**
*Step, name=GP, nlgeom=YES, inc=1000000
*Static
0.002, 1., 1e-09, 0.002
**
** LOADS
**
** Name: G   Type: Gravity
*Dload
, GRAV, 9.8, 0., -1.
**
** PREDEFINED FIELDS
**
** Name: CoolDownPres   Type: Temperature
*Temperature, amplitude=Smf_Dec_1s
Cable_Bm_2D-1.cable, 853.
**
** OUTPUT REQUESTS
**
*Restart, write, frequency=0
*Output, field, frequency=0
*Output, history, frequency=0
*End Step
** ----------------------------------------------------------------
**
** STEP: TimeVaryCableForce
**
*Step, name=TimeVaryCableForce, nlgeom=YES, inc=10000000
*Dynamic,direct
0.001,10.,
**
** LOADS
**
** Name: LoadPoint1_Wn1   Type: Concentrated force
*Cload, op=NEW, amplitude=Lp10_WhiteNoise1_10s_pw1_fs1k
LoadPoint1Geo_WN1-6, 1, 100.
** Name: LoadPoint1_Wn2   Type: Concentrated force
*Cload, op=NEW, amplitude=Lp10_WhiteNoise2_10s_pw1_fs1k
LoadPoint1Geo_WN1-6, 2, 100.
**
** PREDEFINED FIELDS
**
** Name: CoolDownPres   Type: Temperature
*Temperature, amplitude=TriWave_10s_fTri5s_fs200
Cable_Bm_2D-1.cable, -100.
**
** OUTPUT REQUESTS
**
*Restart, write, frequency=0
*Output, field, frequency=0
**
** HISTORY OUTPUT: SENSOR1
**
*Output, history, time interval=0.005, time marks=NO
*Node Output, nset=Sensor1
A1, A2
**
** HISTORY OUTPUT: SENSOR2
**
*Node Output, nset=Sensor2
A1, A2
**
** HISTORY OUTPUT: SENSOR3
**
*Node Output, nset=Sensor3
A1, A2
*End Step
